# EingangsParameter
z_1 := 3
z_2 := 6
a := 100
λ := 0.97
φ_Ae := 170°
φ_As := 60°
φ_j1 := 1°
r_A# := 1
# Parameter berechnen
i := z_2/z_1
r_1 := a/(1 + i) = 33.3333
e := r_1*λ = 32.3333
r_2 := r_1*i = 66.6667
r_A := r_A#*e*sqrt(2 - 2*cos(π/(2*z_1))) = 16.737
r_a1 := e - r_A*cos(φ_Ae) = 48.816
r_A2 := 83.3  # rA=self.rA_star * e*sqrt(2-2*cos(pi/(2*self.z1)))
# Funktionen
r_a2 := r_A2
κ(ζ) := z_2/z_1*ζ
ξ(ζ) := (λ*sin(κ(ζ))/(1 - λ*cos(κ(ζ))))
α_t(ζ) := 90° - ξ(ζ)
p_oa(ζ) := a*[-sin(ζ); cos(ζ)] - e*[-sin(ζ + κ(ζ)); cos(ζ + κ(ζ))]
p_poa(ζ) := a*[-0; 1] - e*[-sin(κ(ζ)); cos(κ(ζ))] - r_A*[-sin(-ξ(ζ)); cos(-ξ(ζ))]
ζ_1 := -5°
p_OC(ζ) := a*[-sin(ζ); cos(ζ)] - e*[-sin(ζ + κ(ζ)); cos(ζ + κ(ζ))] - r_A*[-sin(ζ - ξ(ζ)); cos(ζ - ξ(ζ))]
p_poa(ζ_1) = [-15.3875; 81.7452]
p_poa(ζ_1) - [0; a] = [-15.3875; -18.2548]
# Gleitgeschwindigkeit
ω_1 := 1
v_1(ζ) := [0; 0; ω_1]×(-e*[-sin(κ(ζ)); cos(κ(ζ)); 0] - r_A*[-sin(-ξ(ζ)); cos(-ξ(ζ)); 0])
v_1'(ζ) := ω_1*[-p_poa(ζ)[1] + a; p_poa(ζ)[0]]
v_1(ζ_1) = [18.2548; -15.3875; 0]
v_1'(ζ_1) = [18.2548; -15.3875]
v_2(ζ) := [0; 0; -ω_1/i]×(a*[-0; 1; 0] - e*[-sin(κ(ζ)); cos(κ(ζ)); 0] - r_A*[-sin(-ξ(ζ)); cos(-ξ(ζ)); 0])
v_2'(ζ) := ω_1/i*[p_poa(ζ)[1]; -p_poa(ζ)[0]]
v_2(ζ_1) = [40.8726; 7.69377; 0]
v_2'(ζ_1) = [40.8726; 7.69377]
v_t1(ζ) := v_1(ζ)*transpose([sin(α_t(ζ)); cos(α_t(ζ)); 0])
[7; 8]*[7, 8] = [49, 56; 56, 64]
v_t1(ζ_1) = [-14.8195, 10.6592, 0; 12.4919, -8.98496, 0; 0, 0, 0]
v_t(ζ) := ω_1*r_1
v_G(ζ) := (v_1(ζ) - v_2(ζ))*[sin(α_t(ζ)); cos(α_t(ζ)); 0]
v_G(8) = -69.3626
v_12(ζ) := v_1(ζ) - v_2(ζ) → [
    25.1054473749*cos(sin(2.0*ζ)/(cos(2.0*ζ) - 1.03092783505)) + (48.5*cos(2.0*ζ) - 50.0);
    25.1054473749*sin(sin(2.0*ζ)/(cos(2.0*ζ) - 1.03092783505)) + 48.5*sin(2.0*ζ);
    0.0
]
v_G'(ζ) := (v_1(ζ)[0] - v_2(ζ)[0])*sin(α_t(ζ)) + (v_1(ζ)[1] - v_2(ζ)[1])*cos(α_t(ζ))
v_G'(8) = -69.3626
v_G'(8) = -69.3626
K_G(ζ) := v_G(ζ)/v_t(ζ)
K_G'(ζ) := ((p_poa(ζ)*(1 + 1/i) - [0; a])*[sin(α_t(ζ)); cos(α_t(ζ))])/r_2
K_G(-35°) = 0.442674
v_G(8) = -69.3626
((p_OA(35°)*(1 + 1/i) - [0; a])*[sin(α_t(8)); cos(α_t(5))])/6 =  # error: Diese Variable ist nicht definiert. Prüfen Sie, ob die Beschriftung richtig festgelegt ist.
ζ := -35°, -35° + 0.001 .. -0.2°
[3; 4]*[3; 4] = 25
[6, 8]*[3; 7] = 74
# [chart]
    Y[1] := v_t1(ζ)  # disabled
    X[1] := ζ  # disabled
    X[2] := ζ  # disabled
    Y[2] := v_t2(ζ)  # disabled
    X[3] := ζ  # disabled
    Y[3] := v_G(ζ)  # disabled
    X[3] := ζ  # disabled
    Y[3] := -K_G'(ζ)  # disabled
    X[4] := ζ
    Y[4] := -v_G'(ζ)/v_t(ζ)
    X[5] := ζ
    Y[5] := -K_G(ζ)
# fixes KOordinatessytem
cos(t)*r_A2 == -e*sin(i*ζ) + r_A*sin(-ξ(ζ))
cos(t)*r_A2 == -e*sin(i*ζ) + r_A*sin(-(λ*sin(i*ζ)/(1 - λ*cos(i*ζ))))
t_1 := acos(-e*sin(i*ζ) + r_A*sin(-(λ*sin(i*ζ)/(1 - λ*cos(i*ζ))))/r_A2)  # error: Dieser Wert muss ein Skalar oder eine Matrix sein.
ζ := -35°, -35° + 0.001 .. 35°
# [chart]
    Y[1] := -α_t(-ζ)*180/π
    X[1] := ζ
# Diagramm
start := -π/(2*z_1)
t := start, start + 0.001 .. π/z_1
t_2 := 0, 0.001 .. 2*π
# [chart]
    Y[1] := p_OA(t)[1]
    X[1] := p_OA(t)[0]  # error: Diese Variable ist nicht definiert. Prüfen Sie, ob die Beschriftung richtig festgelegt ist.
    Y[2] := sin(t_2)*r_a1 + a
    X[2] := cos(t_2)*r_a1
    Y[3] := E[1]
    X[3] := E[0]
    X[4] := cos(t_2)*r_a2
    Y[4] := sin(t_2)*r_a2
    X[5] := [0; 0]
    Y[5] := [0; a]
    Y[6] := ppc2(t)[1]
    X[6] := ppc2(t)[0]
# [chart]
    Y[6] := ppc2(t)[1]
    X[6] := ppc2(t)[0]  # error: Diese Variable ist nicht definiert. Prüfen Sie, ob die Beschriftung richtig festgelegt ist.
start1 := π/(z_2*2)
t_circle := start1, start1 + 0.001 .. 3/4*π/z_2
t_contact := -π/z_2, -π/z_2 + 0.001 .. 0
Kreis(t) := r_a2*[-sin(t); cos(t)]
contact(ζ) := a*[-0; 1] - e*[-sin(κ(ζ)); cos(κ(ζ))] - r_A*[-sin(-ξ(ζ)); cos(-ξ(ζ))]
# [chart]
    X[1] := Kreis(t_circle)[0]
    Y[1] := Kreis(t_circle)[1]
    X[5] := [0; 0]
    Y[5] := [0; a]
    X[2] := contact(t_contact)[0]
    Y[2] := contact(t_contact)[1]
