t == 2*t - 4 solve → 4
# [chart]
    X[1] := t
    Y[1] := t
    X[2] := t
    Y[2] := 2*t - 4
M_2 == 1/2*m_2'*r_2'^2*α_2' + 1/2*m_2'*i*(r_2'*i)^2*α_2'/i solve, α_2' → 2*M_2/(m_2'*r_2'^2*i^2 + m_2'*r_2'^2)
